# This is the supplement to the paper by Tatyana Averina (ata@osmf.sscc.ru)
# and Konstantin Rybakov (rkoffice@mail.ru) "Analysis and Conditional Optimization
# of Projection Estimates for Distribution of Random Variable Using Legendre Polynomials" (Algorithms 2025, 18(8), 466. https://doi.org/10.3390/a18080466)
#
# Abstract. Algorithms for jointly obtaining projection estimates of the density and distribution function of a random variable using the Legendre polynomials are proposed. For these algorithms, a problem of the conditional optimization is solved. Such an optimization allows one increasing the approximation accuracy with a minimum computational costs. The proposed algorithms are tested on examples with different degree of smoothness of the density. A projection estimate of the density is compared to a histogram, which is often used in applications to estimate distributions.
# Legendre polynomials (recurrence relations)
_p(i, t) :=
    1 if i ≤ 0
    1/i*((2*i - 1)*t*_p(i - 1, t) - (i - 1)*_p(i - 2, t)) otherwise
p(i, t) := sqrt((2*i + 1)/2)*_p(i, t)
pt(L, t) :=
    for i ∈ 0 .. L - 1
        c[0] ← 1 if i == 0
        c[1] ← t if i == 1
        c[i] ← 1/i*((2*i - 1)*t*c[i - 1] - (i - 1)*c[i - 2]) if i > 1
    for i ∈ 0 .. L - 1
        c[i] ← sqrt((2*i + 1)/2)*c[i]
    c
# Two-parameter family of densities with different degrees of smoothness
# and related distribution functions
n := 1
nL := n
nR := n + 1
g1(x) := 1 - (-x)^nL
g2(x) := 1 - x^nR
γ := integral(g1(x), x = -1 .. 0) + integral(g2(x), x = 0 .. 1) → 7/6
g1(x) := (1 - (-x)^nL)/γ
f1(x) := integral(g1(ξ), ξ = -1 .. x) → 3*(x + 1)^2/7
g2(x) := (1 - x^nR)/γ
f2(x) := f1(0) + integral(g2(ξ), ξ = 0 .. x) → 3/7 - 2*x*(x^2 - 3)/7
g(x) :=
    g1(x) if x < 0
    g2(x) otherwise
f(x) :=
    f1(x) if x < 0
    f2(x) otherwise
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N2 := integral(g1(x)^2, x = -1 .. 0) + integral(g2(x)^2, x = 0 .. 1) → 156/245
F2 := integral(f1(x)^2, x = -1 .. 0) + integral(f2(x)^2, x = 0 .. 1) → 235/343
f0 := f(0) → 3/7
# Modeling the random variable with given test density
gen(nL, nR) :=
    r ← rnd(1)
    root(f1(x) - r, x, -1, 0) if r < f0
    root(f2(x) - r, x, 0, 1) otherwise  # disabled
gen1(nL, nR) :=
    r ← rnd(1)
    sqrt(7*r/3) - 1 if r < f0
    otherwise
        A ← nthroot(-(7*r - 3)/4 + sqrt(((7*r - 3)/4)^2 - 1), 3)
        -Re(A) + sqrt(3)*Im(A)
# Expansion coefficients of test functions
spF1(L) :=
    c[0] ← sqrt(2)
    for i ∈ 1 .. L - 1
        c[i] ← 0
    c
spFt1(L) :=
    c[0] ← 0
    c[1] ← sqrt(6)/3
    for i ∈ 2 .. L - 1
        c[i] ← 0
    c
_spF1L(L) :=
    c[0] ← 1
    c[1] ← -1/2
    for i ∈ 2 .. L
        c[i] ← 0 if mod(i, 2) == 0
        c[i] ← (2 - i)/(i + 1)*c[i - 2] otherwise
    c
_spF1R(L) :=
    c[0] ← 1
    c[1] ← 1/2
    for i ∈ 2 .. L
        c[i] ← 0 if mod(i, 2) == 0
        c[i] ← (2 - i)/(i + 1)*c[i - 2] otherwise
    c
spFtnL(L, n) :=
    c ← _spF1L(L + n)
    for k ∈ 1 .. n
        for i ∈ 0 .. L + n - k - 1
            r[i] ← ((i + 1)*c[i + 1] + if(i == 0, 0, i*c[i - 1]))/(2*i + 1)
        c ← r
    for i ∈ 0 .. L - 1
        b[i] ← sqrt((2*i + 1)/2)*c[i]
    b
spFtnR(L, n) :=
    c ← _spF1R(L + n)
    for k ∈ 1 .. n
        for i ∈ 0 .. L + n - k - 1
            r[i] ← ((i + 1)*c[i + 1] + if(i == 0, 0, i*c[i - 1]))/(2*i + 1)
        c ← r
    for i ∈ 0 .. L - 1
        b[i] ← sqrt((2*i + 1)/2)*c[i]
    b
G2F(G) :=
    F[0] ← G[0] - G[1]/sqrt(3)
    for i ∈ 1 .. rows(G) - 2
        F[i] ← G[i - 1]/sqrt((2*i - 1)*(2*i + 1)) - G[i + 1]/sqrt((2*i + 1)*(2*i + 3))
    F
spDensity(L, nL, nR) := (spF1(L) - (-1)^nL*spFtnL(L, nL) - spFtnR(L, nR))/γ
spDistribution(L, nL, nR) := 1/γ*(nL/(nL + 1)*spF1(L) + spFt1(L) + (-1)^(nL + 1)*spFtnL(L, nL + 1)/(nL + 1) - spFtnR(L, nR + 1)/(nR + 1))
# Numerical experiment
getError(Error) :=
    for j ∈ 0 .. rows(Error) - 2
        μ[j] ← Error[j]/Error[j + 1]
    μ
i := 0 .. 4
L[i] := 2^(i + 2) + 1
transpose(L) = [5, 9, 17, 33, 65]
j := 0 .. 10
M[j] := 2^(9 + j)
GError[i] :=
    G ← spDensity(L[i], nL, nR)
    sqrt(N2 - |G|^2)
FError[i] :=
    F ← spDistribution(L[i], nL, nR)
    sqrt(F2 - |F|^2)
transpose(GError) = [0.0246144, 0.00979984, 0.00383802, 0.00144216, 0.000526888]
transpose(FError) = [0.0057716, 0.00106925, 0.000197849, 3.60299e-5, 6.47824e-6]
transpose(getError(GError)) = [2.51171, 2.55336, 2.66131, 2.73712]
transpose(getError(FError)) = [5.39779, 5.40438, 5.49124, 5.56169]
SGError :=
    l ← rows(L)
    m ← rows(M)
    maxL ← L[l - 1]
    minM ← 1
    maxM ← M[0]
    GA ← spDensity(maxL, nL, nR)
    GB ← 0
    for j ∈ 0 .. m - 1
        for k ∈ minM .. maxM
            GB ← GB + pt(maxL, gen1(nL, nR))
        for i ∈ 0 .. l - 1
            Res[j, i] ← sqrt(N2 - |submatrix(GA, 0, L[i] - 1, 0, 0)|^2 + |submatrix(GA, 0, L[i] - 1, 0, 0) + (-maxM^-1*submatrix(GB, 0, L[i] - 1, 0, 0))|^2)
        minM ← maxM + 1
        maxM ← 2*maxM
    Res
SFError :=
    l ← rows(L)
    m ← rows(M)
    maxL ← L[l - 1]
    minM ← 1
    maxM ← M[0]
    FA ← spDistribution(maxL, nL, nR)
    FB ← 0
    for j ∈ 0 .. m - 1
        for k ∈ minM .. maxM
            FB ← FB + pt(maxL + 1, gen1(nL, nR))
        for i ∈ 0 .. l - 1
            Res[j, i] ← sqrt(F2 - |submatrix(FA, 0, L[i] - 1, 0, 0)|^2 + |submatrix(FA, 0, L[i] - 1, 0, 0) + (-maxM^-1*G2F(submatrix(FB, 0, L[i], 0, 0)))|^2)
        minM ← maxM + 1
        maxM ← 2*maxM
    Res
SGError = [
    0.0578197, 0.117485, 0.1438, 0.167683, 0.218709;
    0.03228, 0.041671, 0.0570969, 0.110674, 0.149227;
    0.0289205, 0.0253555, 0.0484102, 0.0945681, 0.119896;
    0.0273102, 0.0196445, 0.0478771, 0.0628968, 0.0841291;
    0.029323, 0.0238499, 0.0349648, 0.0434039, 0.0520692;
    0.0262279, 0.0157208, 0.0243043, 0.0306146, 0.0388756;
    0.0252055, 0.0119594, 0.0173586, 0.0208695, 0.0253216;
    0.0248008, 0.0107778, 0.0118718, 0.0142941, 0.0187342;
    0.0247115, 0.01037, 0.00659554, 0.00806253, 0.011477;
    0.0247182, 0.010196, 0.00614093, 0.00668666, 0.00994002;
    0.0246215, 0.00987722, 0.00465522, 0.00515012, 0.00817776
]
SFError = [
    0.0123166, 0.0129821, 0.013421, 0.0137968, 0.0140997;
    0.0146234, 0.0140035, 0.0141635, 0.0143042, 0.0144722;
    0.0103743, 0.00900812, 0.00927073, 0.00945844, 0.00956712;
    0.0105597, 0.00908836, 0.00913209, 0.00922297, 0.00927318;
    0.00779216, 0.00566864, 0.00562085, 0.00569883, 0.0057217;
    0.00590054, 0.00183269, 0.00158202, 0.00172772, 0.00181819;
    0.0062986, 0.00278689, 0.00263684, 0.00264542, 0.00268325;
    0.00604824, 0.00211661, 0.00186874, 0.00189145, 0.00192694;
    0.0059783, 0.00191406, 0.00162251, 0.00162306, 0.00163999;
    0.00596105, 0.00185895, 0.001541, 0.00153295, 0.00153808;
    0.00589988, 0.00164068, 0.00127056, 0.00125965, 0.00126347
]
# Comparison with histogram
L := 16
h := 2/L
p(i, t) := 1/sqrt(h)*{
    if(i*h ≤ t + 1 < (i + 1)*h, 1, 0) if i ≠ L - 1
    if(i*h ≤ t + 1 ≤ (i + 1)*h, 1, 0) otherwise
}
i := 0 .. L - 1
G[i] := (f((i + 1)*h - 1) - f(i*h - 1))/sqrt(h)
h(x) := sum(G[i]*p(i, x), i = 0 .. L - 1)
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i := 0 .. 4
L[i] := 2^(i + 2)
transpose(L) = [4, 8, 16, 32, 64]
GError[i] :=
    G ← 0
    h ← 2/L[i]
    for k ∈ 0 .. L[i] - 1
        G[k] ← (f((k + 1)*h - 1) - f(k*h - 1))/sqrt(h)
    sqrt(N2 - |G|^2)
transpose(GError) = [0.186263, 0.094153, 0.0472034, 0.0236175, 0.0118107]
transpose(getError(GError)) = [1.9783, 1.99463, 1.99866, 1.99967]
