# This is the supplement to the paper by Tatyana Averina (ata@osmf.sscc.ru)
# and Konstantin Rybakov (rkoffice@mail.ru) "Analysis and Conditional Optimization
# of Projection Estimates for Distribution of Random Variable Using Legendre Polynomials" (Algorithms 2025, 18(8), 466. https://doi.org/10.3390/a18080466)
#
# Abstract. Algorithms for jointly obtaining projection estimates of the density and distribution function of a random variable using the Legendre polynomials are proposed. For these algorithms, a problem of the conditional optimization is solved. Such an optimization allows one increasing the approximation accuracy with a minimum computational costs. The proposed algorithms are tested on examples with different degree of smoothness of the density. A projection estimate of the density is compared to a histogram, which is often used in applications to estimate distributions.
# Legendre polynomials (recurrence relations)
_p(i, t) :=
    1 if i ≤ 0
    1/i*((2*i - 1)*t*_p(i - 1, t) - (i - 1)*_p(i - 2, t)) otherwise
p(i, t) := sqrt((2*i + 1)/2)*_p(i, t)
pt(L, t) :=
    for i ∈ 0 .. L - 1
        c[0] ← 1 if i == 0
        c[1] ← t if i == 1
        c[i] ← 1/i*((2*i - 1)*t*c[i - 1] - (i - 1)*c[i - 2]) if i > 1
    for i ∈ 0 .. L - 1
        c[i] ← sqrt((2*i + 1)/2)*c[i]
    c
# Two-parameter family of densities with different degrees of smoothness
# and related distribution functions
n := 2
nL := n + 1
nR := n
g1(x) := 1 - (-x)^nL
g2(x) := 1 - x^nR
γ := integral(g1(x), x = -1 .. 0) + integral(g2(x), x = 0 .. 1) → 17/12
g1(x) := (1 - (-x)^nL)/γ
f1(x) := integral(g1(ξ), ξ = -1 .. x) → 3*x^4/17 + 12*x/17 + 9/17
g2(x) := (1 - x^nR)/γ
f2(x) := f1(0) + integral(g2(ξ), ξ = 0 .. x) → 9/17 - 4*x*(x^2 - 3)/17
g(x) :=
    g1(x) if x < 0
    g2(x) otherwise
f(x) :=
    f1(x) if x < 0
    f2(x) otherwise
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N2 := integral(g1(x)^2, x = -1 .. 0) + integral(g2(x)^2, x = 0 .. 1) → 5928/10115
F2 := integral(f1(x)^2, x = -1 .. 0) + integral(f2(x)^2, x = 0 .. 1) → 7801/10115
f0 := f(0) → 9/17
# Modeling the random variable with given test density
gen(nL, nR) :=
    r ← rnd(1)
    root(f1(x) - r, x, -1, 0) if r < f0
    root(f2(x) - r, x, 0, 1) otherwise  # disabled
gen(nL, nR) :=
    r ← rnd(1)
    if r < f0
        w ← nthroot(1 + sqrt((17*r/9 - 1)^3 + 1), 3)
        Y ← w - 1/w*(17*r/9 - 1)
        -sqrt(Y/2) + sqrt(-Y/2 + sqrt(2/Y))
    otherwise
        A ← nthroot(-(17*r - 9)/8 + sqrt(((17*r - 9)/8)^2 - 1), 3)
        -Re(A) + sqrt(3)*Im(A)
# Expansion coefficients of test functions
spF1(L) :=
    c[0] ← sqrt(2)
    for i ∈ 1 .. L - 1
        c[i] ← 0
    c
spFt1(L) :=
    c[0] ← 0
    c[1] ← sqrt(6)/3
    for i ∈ 2 .. L - 1
        c[i] ← 0
    c
_spF1L(L) :=
    c[0] ← 1
    c[1] ← -1/2
    for i ∈ 2 .. L
        c[i] ← 0 if mod(i, 2) == 0
        c[i] ← (2 - i)/(i + 1)*c[i - 2] otherwise
    c
_spF1R(L) :=
    c[0] ← 1
    c[1] ← 1/2
    for i ∈ 2 .. L
        c[i] ← 0 if mod(i, 2) == 0
        c[i] ← (2 - i)/(i + 1)*c[i - 2] otherwise
    c
spFtnL(L, n) :=
    c ← _spF1L(L + n)
    for k ∈ 1 .. n
        for i ∈ 0 .. L + n - k - 1
            r[i] ← ((i + 1)*c[i + 1] + if(i == 0, 0, i*c[i - 1]))/(2*i + 1)
        c ← r
    for i ∈ 0 .. L - 1
        b[i] ← sqrt((2*i + 1)/2)*c[i]
    b
spFtnR(L, n) :=
    c ← _spF1R(L + n)
    for k ∈ 1 .. n
        for i ∈ 0 .. L + n - k - 1
            r[i] ← ((i + 1)*c[i + 1] + if(i == 0, 0, i*c[i - 1]))/(2*i + 1)
        c ← r
    for i ∈ 0 .. L - 1
        b[i] ← sqrt((2*i + 1)/2)*c[i]
    b
G2F(G) :=
    F[0] ← G[0] - G[1]/sqrt(3)
    for i ∈ 1 .. rows(G) - 2
        F[i] ← G[i - 1]/sqrt((2*i - 1)*(2*i + 1)) - G[i + 1]/sqrt((2*i + 1)*(2*i + 3))
    F
spDensity(L, nL, nR) := (spF1(L) - (-1)^nL*spFtnL(L, nL) - spFtnR(L, nR))/γ
spDistribution(L, nL, nR) := 1/γ*(nL/(nL + 1)*spF1(L) + spFt1(L) + (-1)^(nL + 1)*spFtnL(L, nL + 1)/(nL + 1) - spFtnR(L, nR + 1)/(nR + 1))
# Numerical experiment
getError(Error) :=
    for j ∈ 0 .. rows(Error) - 2
        μ[j] ← Error[j]/Error[j + 1]
    μ
i := 0 .. 4
L[i] := 2^(i + 2) + 1
transpose(L) = [5, 9, 17, 33, 65]
j := 0 .. 10
M[j] := 2^(9 + j)
GError[i] :=
    G ← spDensity(L[i], nL, nR)
    sqrt(N2 - |G|^2)
FError[i] :=
    F ← spDistribution(L[i], nL, nR)
    sqrt(F2 - |F|^2)
transpose(GError) = [0.00975676, 0.0017824, 0.00032731, 5.9425e-5, 1.06742e-5]
transpose(FError) = [0.00277915, 0.000138958, 1.40029e-5, 1.39757e-6, 1.34936e-7]
transpose(getError(GError)) = [5.47393, 5.44562, 5.50796, 5.56717]
transpose(getError(FError)) = [20, 9.92352, 10.0194, 10.3573]
SGError :=
    l ← rows(L)
    m ← rows(M)
    maxL ← L[l - 1]
    minM ← 1
    maxM ← M[0]
    GA ← spDensity(maxL, nL, nR)
    GB ← 0
    for j ∈ 0 .. m - 1
        for k ∈ minM .. maxM
            GB ← GB + pt(maxL, gen(nL, nR))
        for i ∈ 0 .. l - 1
            Res[j, i] ← sqrt(N2 - |submatrix(GA, 0, L[i] - 1, 0, 0)|^2 + |submatrix(GA, 0, L[i] - 1, 0, 0) + (-maxM^-1*submatrix(GB, 0, L[i] - 1, 0, 0))|^2)
        minM ← maxM + 1
        maxM ← 2*maxM
    Res
SFError :=
    l ← rows(L)
    m ← rows(M)
    maxL ← L[l - 1]
    minM ← 1
    maxM ← M[0]
    FA ← spDistribution(maxL, nL, nR)
    FB ← 0
    for j ∈ 0 .. m - 1
        for k ∈ minM .. maxM
            FB ← FB + pt(maxL + 1, gen(nL, nR))
        for i ∈ 0 .. l - 1
            Res[j, i] ← sqrt(F2 - |submatrix(FA, 0, L[i] - 1, 0, 0)|^2 + |submatrix(FA, 0, L[i] - 1, 0, 0) + (-maxM^-1*G2F(submatrix(FB, 0, L[i], 0, 0)))|^2)
        minM ← maxM + 1
        maxM ← 2*maxM
    Res
SGError = [
    0.0657183, 0.113008, 0.143258, 0.170258, 0.229343;
    0.0253599, 0.0387056, 0.0698344, 0.107032, 0.14779;
    0.0182861, 0.0239023, 0.0560632, 0.0928342, 0.114322;
    0.0158292, 0.0184008, 0.047068, 0.0639602, 0.0857387;
    0.0184695, 0.0206695, 0.0339517, 0.0437652, 0.0527476;
    0.0133038, 0.0126885, 0.0245975, 0.0305869, 0.0397135;
    0.0113426, 0.00720644, 0.0181866, 0.0208302, 0.0258566;
    0.0102026, 0.00596905, 0.0131462, 0.0140445, 0.0193793;
    0.010032, 0.00375555, 0.00645703, 0.00796123, 0.0114294;
    0.0100733, 0.00341434, 0.00483253, 0.00673354, 0.00956785;
    0.00977927, 0.00218433, 0.00296206, 0.00479294, 0.00788283
]
SFError = [
    0.00994617, 0.0120036, 0.0126575, 0.0131363, 0.0134287;
    0.0128446, 0.0128712, 0.0131144, 0.0132517, 0.0134273;
    0.00874619, 0.00873031, 0.00914103, 0.0092422, 0.00935336;
    0.00995276, 0.00961051, 0.00973952, 0.009807, 0.00985128;
    0.006482, 0.0059883, 0.00604466, 0.00611431, 0.00613562;
    0.00308484, 0.00148318, 0.0015572, 0.00173514, 0.00181753;
    0.0038903, 0.00275246, 0.0027964, 0.00283071, 0.00285144;
    0.00338381, 0.00195935, 0.00197652, 0.00202146, 0.00204367;
    0.00324903, 0.00171111, 0.0017195, 0.00173745, 0.00175119;
    0.00321161, 0.0016258, 0.00162609, 0.00163153, 0.00163561;
    0.00305103, 0.00129571, 0.00129226, 0.00129624, 0.00130102
]
# Comparison with histogram
L := 16
h := 2/L
p(i, t) := 1/sqrt(h)*{
    if(i*h ≤ t + 1 < (i + 1)*h, 1, 0) if i ≠ L - 1
    if(i*h ≤ t + 1 ≤ (i + 1)*h, 1, 0) otherwise
}
i := 0 .. L - 1
G[i] := (f((i + 1)*h - 1) - f(i*h - 1))/sqrt(h)
h(x) := sum(G[i]*p(i, x), i = 0 .. L - 1)
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i := 0 .. 4
L[i] := 2^(i + 2)
transpose(L) = [4, 8, 16, 32, 64]
GError[i] :=
    G ← 0
    h ← 2/L[i]
    for k ∈ 0 .. L[i] - 1
        G[k] ← (f((k + 1)*h - 1) - f(k*h - 1))/sqrt(h)
    sqrt(N2 - |G|^2)
transpose(GError) = [0.171305, 0.0890377, 0.044945, 0.0225259, 0.0112696]
transpose(getError(GError)) = [1.92396, 1.98103, 1.99526, 1.99882]
